# OpenSim document version 30000
Model neck joints 6DOF-scaled:
  credits: Model authors names..
  publications: List of publications related to model...
  length_units: meters
  force_units: N
  gravity: -3.5 -9.80665 0
  BodySet:
    Body ground: mass=0 mass_center=(0 0 0) inertia_xx=0 inertia_yy=0 inertia_zz=0
    Body vehicle_base: mass=1690 mass_center=(0 0 0) inertia_xx=615.167 inertia_yy=3163.74 inertia_zz=2861.77
        meshes=arrow.vtp
      CustomJoint ground_vehicle: parent_body=ground location_in_parent=(0.25802 -0.043748 0.388833) location=(0 0 0)
        Coordinate vehicle_tilt: motion_type=rotational default_value=0 range=(-1.570796 1.570796) clamped=false
            locked=true
        Coordinate vehicle_list: motion_type=rotational default_value=0 range=(-1.570796 1.570796) clamped=false
            locked=true
        Coordinate vehicle_rotation: motion_type=rotational default_value=0 range=(-1.570796 1.570796) clamped=false
            locked=true
        Coordinate vehicle_tx: motion_type=translational default_value=0 range=(-5 5) clamped=false locked=true
        Coordinate vehicle_ty: motion_type=translational default_value=0 range=(-1 2) clamped=false locked=true
        Coordinate vehicle_tz: motion_type=translational default_value=0 range=(-3 3) clamped=false locked=true
        SpatialTransform:
          TransformAxis rotation1: coordinates=vehicle_tilt axis=(0 0 1) LinearFunction(coefficients=1 0)
          TransformAxis rotation2: coordinates=vehicle_list axis=(1 0 0) LinearFunction(coefficients=1 0)
          TransformAxis rotation3: coordinates=vehicle_rotation axis=(0 1 0) LinearFunction(coefficients=1 0)
          TransformAxis translation1: coordinates=vehicle_tx axis=(1 0 0) LinearFunction(coefficients=1 0)
          TransformAxis translation2: coordinates=vehicle_ty axis=(0 1 0) LinearFunction(coefficients=1 0)
          TransformAxis translation3: coordinates=vehicle_tz axis=(0 0 1) LinearFunction(coefficients=1 0)
    Body Seat_Cushion: mass=1 mass_center=(0 0 0) inertia_xx=1 inertia_yy=1 inertia_zz=1 meshes=box.vtp
      WeldJoint SeatCshToGround: parent_body=vehicle_base location_in_parent=(-0.25802 -0.0565 -0.388833)
          orientation_in_parent=(0 0 0.21) location=(0 0 0)
    Body Seat_Back: mass=1 mass_center=(0 0 0) inertia_xx=1 inertia_yy=1 inertia_zz=1 meshes=box.vtp
      WeldJoint SeatBkToGround: parent_body=Seat_Cushion location_in_parent=(-0.204 0 0)
          orientation_in_parent=(0 0 -1.47) location=(0.27 0 0)
    Body Floor_Cushion: mass=1 mass_center=(0 0 0) inertia_xx=1 inertia_yy=1 inertia_zz=1 meshes=box.vtp
      WeldJoint FloorCshToGround: parent_body=vehicle_base location_in_parent=(0.252 -0.37 -0.388833)
          orientation_in_parent=(0 0 0.07) location=(0 0 0)
    Body Floor_Pan: mass=1 mass_center=(0 0 0) inertia_xx=1 inertia_yy=1 inertia_zz=1 meshes=box.vtp
      WeldJoint FloorPnToGround: parent_body=Floor_Cushion location_in_parent=(0.295 0 0)
          orientation_in_parent=(0 0 0.76) location=(-0.21 0 0)
    Body B_pedal: mass=0.582 mass_center=(0 0 0) inertia_xx=0.00334 inertia_yy=0.00055 inertia_zz=0.00312
        meshes=B_Pedal.stl
      CustomJoint B_Pedal-Floor: parent_body=Floor_Cushion location_in_parent=(0.395 0.4 -0.0239)
          orientation_in_parent=(0 0 -0.07) location=(0 0 0)
        Coordinate B_Pedal_tilt: motion_type=rotational default_value=0 range=(-1.570796 1.570796) clamped=false
        SpatialTransform: axes_held_at_zero=(rotation2 rotation3 translation1 translation2 translation3)
          TransformAxis rotation1: coordinates=B_Pedal_tilt axis=(0 0 1) LinearFunction(coefficients=1 0)
    Body G_pedal: mass=0.0816 mass_center=(0 0 0) inertia_xx=0.00027 inertia_yy=0.00023 inertia_zz=0.00047
        meshes=G_Pedal.stl
      CustomJoint G_Pedal-Floor: parent_body=Floor_Cushion location_in_parent=(0.5 0.33 0.206)
          orientation_in_parent=(0 0 -0.07) location=(0 0 0)
        Coordinate G_Pedal_tilt: motion_type=rotational default_value=0 range=(-1.570796 1.570796) clamped=false
        SpatialTransform: axes_held_at_zero=(rotation2 rotation3 translation1 translation2 translation3)
          TransformAxis rotation1: coordinates=G_Pedal_tilt axis=(0 0 1) LinearFunction(coefficients=1 0)
    Body spine: mass=6.3 mass_center=(-0.081 0.18 0) inertia_xx=0.294 inertia_yy=0.2311 inertia_zz=0.5248
        meshes=tlspine.vtp
      CustomJoint spine: parent_body=Seat_Cushion location_in_parent=(0 0.2 0) location=(0 0 0)
        Coordinate hip_pitch: motion_type=rotational default_value=0 range=(-3.141593 3.141593) clamped=true
        Coordinate hip_roll: motion_type=rotational default_value=0 range=(-3.141593 3.141593) clamped=true
        Coordinate hip_yaw: motion_type=rotational default_value=0 range=(-3.141593 3.141593) clamped=true
        SpatialTransform: axes_held_at_zero=(translation1 translation2 translation3)
          TransformAxis rotation1: coordinates=hip_pitch axis=(0 0 1) LinearFunction(coefficients=1 0)
          TransformAxis rotation2: coordinates=hip_roll axis=(1 0 0) LinearFunction(coefficients=1 0)
          TransformAxis rotation3: coordinates=hip_yaw axis=(0 1 0) LinearFunction(coefficients=1 0)
    Body rscapula: mass=3 mass_center=(0 0 0) inertia_xx=0.00124 inertia_yy=0.00115 inertia_zz=0.00137
        meshes=scapula.vtp
      WeldJoint rscapulajnt: parent_body=spine location_in_parent=(-0.0366 0.3623 0.1837)
          orientation_in_parent=(0.1745329 -0.296706 -0.1745329) location=(0 0 0)
    Body rclavicle: mass=0.6 mass_center=(0 0 0) inertia_xx=0.00024 inertia_yy=0.00026 inertia_zz=4e-5
        meshes=clavicle.vtp
      WeldJoint rclaviclejnt: parent_body=spine location_in_parent=(-0.0118 0.3353 0.022)
          orientation_in_parent=(0 0.1396263 0) location=(0 0 0)
    Body lscapula: mass=3 mass_center=(0 0 0) inertia_xx=0.00124 inertia_yy=0.00115 inertia_zz=0.00137
        meshes=scapula.vtp
      WeldJoint lscapulajnt: parent_body=spine location_in_parent=(-0.0366 0.3623 -0.1837)
          orientation_in_parent=(-0.1745329 0.296706 -0.1745329) location=(0 0 0)
    Body lclavicle: mass=0.6 mass_center=(0 0 0) inertia_xx=0.00024 inertia_yy=0.00026 inertia_zz=4e-5
        meshes=clavicle.vtp
      WeldJoint lclaviclejnt: parent_body=spine location_in_parent=(-0.0118 0.3353 -0.022)
          orientation_in_parent=(0 -0.1396263 0) location=(0 0 0)
    Body ribcage: mass=20.3 mass_center=(-0.03 0.2 0) inertia_xx=0.9312 inertia_yy=0.7315 inertia_zz=1.6621
        meshes=ribcage.vtp
      WeldJoint ribcagejnt: parent_body=spine location_in_parent=(0 0 0) location=(0 0 0)
    Body auxt1: mass=0 mass_center=(0 0 0) inertia_xx=0 inertia_yy=0 inertia_zz=0
      CustomJoint auxt1jnt: parent_body=spine location_in_parent=(-0.0475 0.3613 0) location=(0 0 0)
        Coordinate pitch2: motion_type=rotational default_value=0 range=(-0.5759587 0.837758) clamped=true
        Coordinate roll2: motion_type=rotational default_value=0 range=(-0.5759587 0.5759587) clamped=true locked=true
        Coordinate yaw2: motion_type=rotational default_value=0 range=(-0.4712389 0.4712389) clamped=true locked=true
        SpatialTransform: axes_held_at_zero=(translation1 translation2 translation3)
          TransformAxis rotation1: coordinates=pitch2 axis=(0 0 1)
            SimmSpline: x=(-1.74533 1.74533) y=(-0.172788 0.172788)
          TransformAxis rotation2: coordinates=roll2 axis=(1 0 0)
            SimmSpline: x=(-1.74533 1.74533) y=(-0.136136 0.136136)
          TransformAxis rotation3: coordinates=yaw2 axis=(0 1 0)
            SimmSpline: x=(-1.74533 1.74533) y=(-0.109956 0.109956)
    Body cerv7: mass=0.9 mass_center=(0 0 0) inertia_xx=0.03082 inertia_yy=0.12327 inertia_zz=0.118 meshes=cerv7.vtp
      WeldJoint cerv7jnt: parent_body=auxt1 location_in_parent=(-0.00684 0.005655 0) location=(0 0 0)
    Body aux7: mass=0 mass_center=(0 0 0) inertia_xx=0 inertia_yy=0 inertia_zz=0
      CustomJoint aux7jnt: parent_body=cerv7 location_in_parent=(0.013256 0.01238 0) location=(0 0 0)
        Coordinate aux7jnt_r3: motion_type=rotational default_value=0 range=(-99999.9 99999.9) clamped=false
        Coordinate aux7jnt_r1: motion_type=rotational default_value=0 range=(-99999.9 99999.9) clamped=false
        Coordinate aux7jnt_r2: motion_type=rotational default_value=0 range=(-99999.9 99999.9) clamped=false
        SpatialTransform: axes_held_at_zero=(translation1 translation2 translation3)
          TransformAxis rotation1: coordinates=aux7jnt_r3 axis=(0 0 1) LinearFunction(coefficients=1 0)
          TransformAxis rotation2: coordinates=aux7jnt_r1 axis=(1 0 0) LinearFunction(coefficients=1 0)
          TransformAxis rotation3: coordinates=aux7jnt_r2 axis=(0 1 0) LinearFunction(coefficients=1 0)
    Body cerv6: mass=0.7 mass_center=(0 0 0) inertia_xx=0.03151 inertia_yy=0.12605 inertia_zz=0.085 meshes=cerv6.vtp
      WeldJoint cerv6jnt: parent_body=aux7 location_in_parent=(-0.009419 0.004065 0) location=(0 0 0)
    Body aux6: mass=0 mass_center=(0 0 0) inertia_xx=0 inertia_yy=0 inertia_zz=0
      CustomJoint aux6jnt: parent_body=cerv6 location_in_parent=(0.00985 0.00975 0) location=(0 0 0)
        Coordinate aux6jnt_r3: motion_type=rotational default_value=0 range=(-99999.9 99999.9) clamped=false
        Coordinate aux6jnt_r1: motion_type=rotational default_value=0 range=(-99999.9 99999.9) clamped=false
        Coordinate aux6jnt_r2: motion_type=rotational default_value=0 range=(-99999.9 99999.9) clamped=false
        SpatialTransform: axes_held_at_zero=(translation1 translation2 translation3)
          TransformAxis rotation1: coordinates=aux6jnt_r3 axis=(0 0 1) LinearFunction(coefficients=1 0)
          TransformAxis rotation2: coordinates=aux6jnt_r1 axis=(1 0 0) LinearFunction(coefficients=1 0)
          TransformAxis rotation3: coordinates=aux6jnt_r2 axis=(0 1 0) LinearFunction(coefficients=1 0)
    Body cerv5: mass=0.6 mass_center=(0 0 0) inertia_xx=0.03263 inertia_yy=0.13051 inertia_zz=0.058 meshes=cerv5.vtp
      WeldJoint cerv5jnt: parent_body=aux6 location_in_parent=(-0.00567 0.00815 0) location=(0 0 0)
    Body aux5: mass=0 mass_center=(0 0 0) inertia_xx=0 inertia_yy=0 inertia_zz=0
      CustomJoint aux5jnt: parent_body=cerv5 location_in_parent=(0.00843 0.00745 0) location=(0 0 0)
        Coordinate aux5jnt_r3: motion_type=rotational default_value=0 range=(-99999.9 99999.9) clamped=false
        Coordinate aux5jnt_r1: motion_type=rotational default_value=0 range=(-99999.9 99999.9) clamped=false
        Coordinate aux5jnt_r2: motion_type=rotational default_value=0 range=(-99999.9 99999.9) clamped=false
        SpatialTransform: axes_held_at_zero=(translation1 translation2 translation3)
          TransformAxis rotation1: coordinates=aux5jnt_r3 axis=(0 0 1) LinearFunction(coefficients=1 0)
          TransformAxis rotation2: coordinates=aux5jnt_r1 axis=(1 0 0) LinearFunction(coefficients=1 0)
          TransformAxis rotation3: coordinates=aux5jnt_r2 axis=(0 1 0) LinearFunction(coefficients=1 0)
    Body cerv4: mass=0.6 mass_center=(0 0 0) inertia_xx=0.03307 inertia_yy=0.13229 inertia_zz=0.06 meshes=cerv4.vtp
      WeldJoint cerv4jnt: parent_body=aux5 location_in_parent=(-0.00502 0.01172 0) location=(0 0 0)
    Body aux4: mass=0 mass_center=(0 0 0) inertia_xx=0 inertia_yy=0 inertia_zz=0
      CustomJoint aux4jnt: parent_body=cerv4 location_in_parent=(0.00732 0.00638 0) location=(0 0 0)
        Coordinate aux4jnt_r3: motion_type=rotational default_value=0 range=(-99999.9 99999.9) clamped=false
        Coordinate aux4jnt_r1: motion_type=rotational default_value=0 range=(-99999.9 99999.9) clamped=false
        Coordinate aux4jnt_r2: motion_type=rotational default_value=0 range=(-99999.9 99999.9) clamped=false
        SpatialTransform: axes_held_at_zero=(translation1 translation2 translation3)
          TransformAxis rotation1: coordinates=aux4jnt_r3 axis=(0 0 1) LinearFunction(coefficients=1 0)
          TransformAxis rotation2: coordinates=aux4jnt_r1 axis=(1 0 0) LinearFunction(coefficients=1 0)
          TransformAxis rotation3: coordinates=aux4jnt_r2 axis=(0 1 0) LinearFunction(coefficients=1 0)
    Body cerv3: mass=0.6 mass_center=(0 0 0) inertia_xx=0.03335 inertia_yy=0.13338 inertia_zz=0.074 meshes=cerv3.vtp
      WeldJoint cerv3jnt: parent_body=aux4 location_in_parent=(-0.00471 0.00902 0) location=(0 0 0)
    Body aux3: mass=0 mass_center=(0 0 0) inertia_xx=0 inertia_yy=0 inertia_zz=0
      CustomJoint aux3jnt: parent_body=cerv3 location_in_parent=(0.00525 0.00506 0) location=(0 0 0)
        Coordinate aux3jnt_r3: motion_type=rotational default_value=0 range=(-99999.9 99999.9) clamped=false
        Coordinate aux3jnt_r1: motion_type=rotational default_value=0 range=(-99999.9 99999.9) clamped=false
        Coordinate aux3jnt_r2: motion_type=rotational default_value=0 range=(-99999.9 99999.9) clamped=false
        SpatialTransform: axes_held_at_zero=(translation1 translation2 translation3)
          TransformAxis rotation1: coordinates=aux3jnt_r3 axis=(0 0 1) LinearFunction(coefficients=1 0)
          TransformAxis rotation2: coordinates=aux3jnt_r1 axis=(1 0 0) LinearFunction(coefficients=1 0)
          TransformAxis rotation3: coordinates=aux3jnt_r2 axis=(0 1 0) LinearFunction(coefficients=1 0)
    Body cerv2: mass=0.9 mass_center=(0 0 0) inertia_xx=0.03064 inertia_yy=0.12254 inertia_zz=0.222 meshes=cerv2.vtp
      WeldJoint cerv2jnt: parent_body=aux3 location_in_parent=(-0.00543 0.01123 0) location=(0 0 0)
    Body aux2: mass=0 mass_center=(0 0 0) inertia_xx=0 inertia_yy=0 inertia_zz=0
      CustomJoint aux2jnt: parent_body=cerv2 location_in_parent=(0.00689 0.02128 0) location=(0 0 0)
        Coordinate pitch1: motion_type=rotational default_value=0 range=(-0.2792527 0.418879) clamped=true
        Coordinate roll1: motion_type=rotational default_value=0 range=(-0.1047198 0.1047198) clamped=true locked=true
        Coordinate yaw1: motion_type=rotational default_value=0 range=(-0.6632251 0.6632251) clamped=true locked=true
        SpatialTransform: axes_held_at_zero=(translation1 translation2 translation3)
          TransformAxis rotation1: coordinates=pitch1 axis=(0 0 1)
            SimmSpline: x=(-1.74533 1.74533) y=(-0.774926 0.774926)
          TransformAxis rotation2: coordinates=roll1 axis=(1 0 0)
            SimmSpline: x=(-1.74533 1.74533) y=(-0.872665 0.872665)
          TransformAxis rotation3: coordinates=yaw1 axis=(0 1 0)
            SimmSpline: x=(-1.74533 1.74533) y=(-1.5516 1.5516)
    Body cerv1: mass=0.7 mass_center=(0 0 0) inertia_xx=0.03424 inertia_yy=0.13697 inertia_zz=0.222 meshes=cerv1.vtp
      WeldJoint cerv1jnt: parent_body=aux2 location_in_parent=(-0.04245 -0.00352 0) location=(0 0 0)
    Body aux1: mass=0 mass_center=(0 0 0) inertia_xx=0 inertia_yy=0 inertia_zz=0
      CustomJoint aux1jnt: parent_body=cerv1 location_in_parent=(0.04335 0.01492 0) location=(0 0 0)
        Coordinate aux1jnt_r3: motion_type=rotational default_value=0 range=(-99999.9 99999.9) clamped=false
        Coordinate aux1jnt_r1: motion_type=rotational default_value=0 range=(-99999.9 99999.9) clamped=false
        Coordinate aux1jnt_r2: motion_type=rotational default_value=0 range=(-99999.9 99999.9) clamped=false
        SpatialTransform: axes_held_at_zero=(translation1 translation2 translation3)
          TransformAxis rotation1: coordinates=aux1jnt_r3 axis=(0 0 1) LinearFunction(coefficients=1 0)
          TransformAxis rotation2: coordinates=aux1jnt_r1 axis=(1 0 0) LinearFunction(coefficients=1 0)
          TransformAxis rotation3: coordinates=aux1jnt_r2 axis=(0 1 0) LinearFunction(coefficients=1 0)
    Body skull: mass=5 mass_center=(0.0391 0.055 0) inertia_xx=0.03328 inertia_yy=0.0125 inertia_zz=0.03589
        meshes=skull.vtp
      WeldJoint skulljnt: parent_body=aux1 location_in_parent=(0 0 0) location=(0 0 0)
    Body jaw: mass=0.6 mass_center=(0.04 0 0) inertia_xx=0.04 inertia_yy=0.02 inertia_zz=0.04 meshes=jaw.vtp
      WeldJoint jawjnt: parent_body=skull location_in_parent=(0 0 0) location=(0 0 0)
    Body marker_SeatC-01: mass=1 mass_center=(0 0 0) inertia_xx=1 inertia_yy=1 inertia_zz=1 meshes=sphere.vtp
      WeldJoint M01ToGround: parent_body=ground location_in_parent=(-0.15882 -0.160659 0.202863) location=(0 0 0)
    Body marker_SeatC-02: mass=1 mass_center=(0 0 0) inertia_xx=1 inertia_yy=1 inertia_zz=1 meshes=sphere.vtp
      WeldJoint M02ToGround: parent_body=ground location_in_parent=(0.26218 -0.072659 0.202863) location=(0 0 0)
    Body marker_SeatC-03: mass=1 mass_center=(0 0 0) inertia_xx=1 inertia_yy=1 inertia_zz=1 meshes=sphere.vtp
      WeldJoint M03ToGround: parent_body=ground location_in_parent=(0.26218 -0.072659 -0.177137) location=(0 0 0)
    Body marker_SeatC-04: mass=1 mass_center=(0 0 0) inertia_xx=1 inertia_yy=1 inertia_zz=1 meshes=sphere.vtp
      WeldJoint M04ToGround: parent_body=ground location_in_parent=(-0.15882 -0.160659 -0.177137) location=(0 0 0)
    Body marker_SeatB-01: mass=1 mass_center=(0 0 0) inertia_xx=1 inertia_yy=1 inertia_zz=1 meshes=sphere.vtp
      WeldJoint SB01ToGround: parent_body=ground location_in_parent=(-0.16782 -0.156659 -0.148137) location=(0 0 0)
    Body marker_SeatB-02: mass=1 mass_center=(0 0 0) inertia_xx=1 inertia_yy=1 inertia_zz=1 meshes=sphere.vtp
      WeldJoint SB02ToGround: parent_body=ground location_in_parent=(-0.16782 -0.156659 0.169863) location=(0 0 0)
    Body marker_SeatB-03: mass=1 mass_center=(0 0 0) inertia_xx=1 inertia_yy=1 inertia_zz=1 meshes=sphere.vtp
      WeldJoint SB03ToGround: parent_body=ground location_in_parent=(-0.34482 0.401341 0.169863) location=(0 0 0)
    Body marker_SeatB-04: mass=1 mass_center=(0 0 0) inertia_xx=1 inertia_yy=1 inertia_zz=1 meshes=sphere.vtp
      WeldJoint SB04ToGround: parent_body=ground location_in_parent=(-0.34482 0.401341 -0.148137) location=(0 0 0)
    Body marker_FloorC-01: mass=1 mass_center=(0 0 0) inertia_xx=1 inertia_yy=1 inertia_zz=1 meshes=sphere.vtp
      WeldJoint FC01ToGround: parent_body=ground location_in_parent=(0.30518 -0.401659 -0.268137) location=(0 0 0)
    Body marker_FloorC-02: mass=1 mass_center=(0 0 0) inertia_xx=1 inertia_yy=1 inertia_zz=1 meshes=sphere.vtp
      WeldJoint FC02ToGround: parent_body=ground location_in_parent=(0.71418 -0.375659 -0.268137) location=(0 0 0)
    Body marker_FloorC-03: mass=1 mass_center=(0 0 0) inertia_xx=1 inertia_yy=1 inertia_zz=1 meshes=sphere.vtp
      WeldJoint FC03ToGround: parent_body=ground location_in_parent=(0.71418 -0.375659 0.175863) location=(0 0 0)
    Body marker_FloorC-04: mass=1 mass_center=(0 0 0) inertia_xx=1 inertia_yy=1 inertia_zz=1 meshes=sphere.vtp
      WeldJoint FL04ToGround: parent_body=ground location_in_parent=(0.30518 -0.401659 0.175863) location=(0 0 0)
    Body marker_FloorP-01: mass=1 mass_center=(0 0 0) inertia_xx=1 inertia_yy=1 inertia_zz=1 meshes=sphere.vtp
      WeldJoint FP01ToGround: parent_body=ground location_in_parent=(0.79518 -0.363659 -0.270137) location=(0 0 0)
    Body marker_FloorP-02: mass=1 mass_center=(0 0 0) inertia_xx=1 inertia_yy=1 inertia_zz=1 meshes=sphere.vtp
      WeldJoint FP02ToGround: parent_body=ground location_in_parent=(1.06518 -0.068659 -0.270137) location=(0 0 0)
    Body marker_FloorP-03: mass=1 mass_center=(0 0 0) inertia_xx=1 inertia_yy=1 inertia_zz=1 meshes=sphere.vtp
      WeldJoint FP03ToGround: parent_body=ground location_in_parent=(1.06518 -0.068659 0.191863) location=(0 0 0)
    Body marker_FloorP-04: mass=1 mass_center=(0 0 0) inertia_xx=1 inertia_yy=1 inertia_zz=1 meshes=sphere.vtp
      WeldJoint FP04ToGround: parent_body=ground location_in_parent=(0.79518 -0.363659 0.191863) location=(0 0 0)
    Body vehicle_geom: mass=1 mass_center=(0 0 0) inertia_xx=1 inertia_yy=1 inertia_zz=1 meshes=camry-cockpit2.stl
      WeldJoint VehGToGround: parent_body=ground location_in_parent=(0 0 0) location=(0 0 0)
  ConstraintSet:
    CoordinateCouplerConstraint aux7jnt_r1_con: independent_coordinate_names=roll2 dependent_coordinate_name=aux7jnt_r1
      coupled_coordinates_function: SimmSpline: x=(-1.74533 1.74533) y=(-0.23911 0.23911)
    CoordinateCouplerConstraint aux7jnt_r2_con: independent_coordinate_names=yaw2 dependent_coordinate_name=aux7jnt_r2
      coupled_coordinates_function: SimmSpline: x=(-1.74533 1.74533) y=(-0.328122 0.328122)
    CoordinateCouplerConstraint aux7jnt_r3_con: independent_coordinate_names=pitch2
        dependent_coordinate_name=aux7jnt_r3
      coupled_coordinates_function: SimmSpline: x=(-1.74533 1.74533) y=(-0.326377 0.326377)
    CoordinateCouplerConstraint aux6jnt_r1_con: independent_coordinate_names=roll2 dependent_coordinate_name=aux6jnt_r1
      coupled_coordinates_function: SimmSpline: x=(-1.74533 1.74533) y=(-0.274017 0.274017)
    CoordinateCouplerConstraint aux6jnt_r2_con: independent_coordinate_names=yaw2 dependent_coordinate_name=aux6jnt_r2
      coupled_coordinates_function: SimmSpline: x=(-1.74533 1.74533) y=(-0.382227 0.382227)
    CoordinateCouplerConstraint aux6jnt_r3_con: independent_coordinate_names=pitch2
        dependent_coordinate_name=aux6jnt_r3
      coupled_coordinates_function: SimmSpline: x=(-1.74533 1.74533) y=(-0.383972 0.383972)
    CoordinateCouplerConstraint aux5jnt_r1_con: independent_coordinate_names=roll2 dependent_coordinate_name=aux5jnt_r1
      coupled_coordinates_function: SimmSpline: x=(-1.74533 1.74533) y=(-0.376991 0.376991)
    CoordinateCouplerConstraint aux5jnt_r2_con: independent_coordinate_names=yaw2 dependent_coordinate_name=aux5jnt_r2
      coupled_coordinates_function: SimmSpline: x=(-1.74533 1.74533) y=(-0.382227 0.382227)
    CoordinateCouplerConstraint aux5jnt_r3_con: independent_coordinate_names=pitch2
        dependent_coordinate_name=aux5jnt_r3
      coupled_coordinates_function: SimmSpline: x=(-1.74533 1.74533) y=(-0.383972 0.383972)
    CoordinateCouplerConstraint aux4jnt_r1_con: independent_coordinate_names=roll2 dependent_coordinate_name=aux4jnt_r1
      coupled_coordinates_function: SimmSpline: x=(-1.74533 1.74533) y=(-0.376991 0.376991)
    CoordinateCouplerConstraint aux4jnt_r2_con: independent_coordinate_names=yaw2 dependent_coordinate_name=aux4jnt_r2
      coupled_coordinates_function: SimmSpline: x=(-1.74533 1.74533) y=(-0.382227 0.382227)
    CoordinateCouplerConstraint aux4jnt_r3_con: independent_coordinate_names=pitch2
        dependent_coordinate_name=aux4jnt_r3
      coupled_coordinates_function: SimmSpline: x=(-1.74533 1.74533) y=(-0.287979 0.287979)
    CoordinateCouplerConstraint aux3jnt_r1_con: independent_coordinate_names=roll2 dependent_coordinate_name=aux3jnt_r1
      coupled_coordinates_function: SimmSpline: x=(-1.74533 1.74533) y=(-0.342085 0.342085)
    CoordinateCouplerConstraint aux3jnt_r2_con: independent_coordinate_names=yaw2 dependent_coordinate_name=aux3jnt_r2
      coupled_coordinates_function: SimmSpline: x=(-1.74533 1.74533) y=(-0.164061 0.164061)
    CoordinateCouplerConstraint aux3jnt_r3_con: independent_coordinate_names=pitch2
        dependent_coordinate_name=aux3jnt_r3
      coupled_coordinates_function: SimmSpline: x=(-1.74533 1.74533) y=(-0.191986 0.191986)
    CoordinateCouplerConstraint aux1jnt_r1_con: independent_coordinate_names=roll1 dependent_coordinate_name=aux1jnt_r1
      coupled_coordinates_function: SimmSpline: x=(-1.74533 1.74533) y=(-0.872665 0.872665)
    CoordinateCouplerConstraint aux1jnt_r2_con: independent_coordinate_names=yaw1 dependent_coordinate_name=aux1jnt_r2
      coupled_coordinates_function: SimmSpline: x=(-1.74533 1.74533) y=(-0.193732 0.193732)
    CoordinateCouplerConstraint aux1jnt_r3_con: independent_coordinate_names=pitch1
        dependent_coordinate_name=aux1jnt_r3
      coupled_coordinates_function: SimmSpline: x=(-1.74533 1.74533) y=(-0.970403 0.970403)
  ForceSet:
    CoordinateLimitForce [values shared by the 9 below unless stated]: upper_stiffness=0.5 [N*m/degree]
        lower_stiffness=0.5 [N*m/degree] damping=0.025 transition=5 [degrees] compute_dissipation_energy=false
    CoordinateLimitForce hippitchlimit: coordinate=hip_pitch upper_limit=60 [degrees] lower_limit=-60 [degrees]
    CoordinateLimitForce hiprolllimit: coordinate=hip_roll upper_limit=60 lower_limit=-60
    CoordinateLimitForce hipyawlimit: coordinate=hip_yaw upper_limit=60 lower_limit=-60
    CoordinateLimitForce neckpitchlimit: coordinate=pitch2 upper_limit=48 lower_limit=-33
    CoordinateLimitForce neckrolllimit: coordinate=roll2 upper_limit=33 lower_limit=-33
    CoordinateLimitForce neckyawlimit: coordinate=yaw2 upper_limit=27 lower_limit=-27
    CoordinateLimitForce headpitchlimit: coordinate=pitch1 upper_limit=24 lower_limit=-16
    CoordinateLimitForce headrolllimit: coordinate=roll1 upper_limit=6 lower_limit=-6
    CoordinateLimitForce headyawlimit: coordinate=yaw1 upper_limit=38 lower_limit=-38
    HuntCrossleyForce HipForce_Back: transition_velocity=0.2
      ContactParametersSet contact_parameters:
        ContactParameters: geometry=(RBack_01-Contact LBack_01-Contact RBack_02-Contact LBack_02-Contact Seat_Back-Contact)
            stiffness=1000000 dissipation=1 static_friction=0.8 dynamic_friction=0.4 viscous_friction=0.4
    CoordinateActuator [values shared by the 6 below unless stated]: min_control=0 max_control=1 optimal_force=1000
    CoordinateActuator neckpitch: coordinate=pitch1
    CoordinateActuator neckroll: coordinate=roll1
    CoordinateActuator neckyaw: coordinate=yaw1
    CoordinateActuator headpitch: coordinate=pitch2
    CoordinateActuator headroll: coordinate=roll2
    CoordinateActuator headyaw: coordinate=yaw2
  ContactGeometrySet:
    ContactHalfSpace Seat_Cushion-Contact: body_name=Seat_Cushion location=(-0.21 -0.03 0) orientation=(0 0 -1.570796)
    ContactHalfSpace Seat_Back-Contact: body_name=Seat_Back location=(0.218 0.02 0) orientation=(0 0 -1.570796)
    ContactHalfSpace Floor_Cushion-Contact: body_name=Floor_Cushion location=(0 0.02 0) orientation=(0 0 -1.570796)
    ContactHalfSpace Floor_Pan-Contact: body_name=Floor_Pan location=(0 0.02 0) orientation=(0 0 -1.570796)
    ContactSphere RBack_01-Contact: body_name=spine location=(-0.1 0.1 0.1) radius=0.06
    ContactSphere LBack_01-Contact: body_name=spine location=(-0.1 0.1 -0.1) radius=0.06
    ContactSphere RBack_02-Contact: body_name=spine location=(-0.12 0.3 0.1) radius=0.06
    ContactSphere LBack_02-Contact: body_name=spine location=(-0.12 0.3 -0.1) radius=0.06
